# Auto-generated initial GCMC input
# Generated by mtagent/run_initial.py
# RH = 0.90
# Start source (equilibration_restart) = <REPO_ROOT>/examples/Mt_Na_LC050_N20/inputs/restart.pre_gcmc.final
# Segment steps = 100000

variable temp        equal 300.0
variable rh          equal 0.900000
variable p_h2o       equal 0.00898632124352
variable mu          equal -8.1
variable disp        equal 0.5
variable tfac        equal 1.6666666667

units real
atom_style full
boundary p p p

pair_style lj/cut/coul/long 12.0
pair_modify mix arithmetic
bond_style harmonic
angle_style harmonic
special_bonds lj/coul 0.0 0.0 0.5

read_restart <REPO_ROOT>/examples/Mt_Na_LC050_N20/inputs/restart.pre_gcmc.final
include <REPO_ROOT>/examples/Mt_Na_LC050_N20/inputs/Mt_Na_LC050_N20_groups_regions.inc

kspace_style pppm 1.0e-4

neighbor 2.0 bin
neigh_modify every 2 delay 0 check yes

timestep 1.0

# Molecule template for GCMC insertion.
molecule h2omol <REPO_ROOT>/assets/forcefields/SPCEH2O_types_8_10.txt

group clay union clay_lower clay_upper
group mobile union water sodium

# Rigid clay sheets: z-translation only, no x/y motion, no rotation.
# clay molecule IDs are normalized: lower=1, upper=2
velocity clay set 0.0 0.0 0.0
fix rigid_clay clay rigid/nve molecule force * off off on torque * off off off

# Exclude only intra-sheet nonbonded interactions.
neigh_modify exclude group clay_lower clay_lower
neigh_modify exclude group clay_upper clay_upper

# Mobile phase.
fix wshake water shake 1.0e-4 50 0 b 1 a 1 mol h2omol
fix mom_water water momentum 100 linear 1 1 1
fix mom_ions sodium momentum 100 linear 1 1 1
compute_modify thermo_temp dynamic/dof yes

# Initial NVT relaxation
# Existing mobile velocities are preserved from read_restart.
fix nvt_mobile mobile nvt temp ${temp} ${temp} 100.0
run 10000
unfix nvt_mobile

# RH GCMC-MD segment
fix nvt_water water nvt temp ${temp} ${temp} 100.0
fix nvt_ions sodium nvt temp ${temp} ${temp} 100.0
compute_modify nvt_water_temp dynamic/dof yes

# GCMC insertion region from case.yaml.
region rgmc block 0.1 25.7 0.1 35.7 20 65 units box

fix mygcmc water gcmc 1000 100 0 0 54341 ${temp} ${mu} ${disp} mol &
             h2omol tfac_insert ${tfac} region rgmc group water shake wshake &
             pressure ${p_h2o}

# ---------- monitors ----------
variable nwater_atoms equal count(water)
variable nwater_mol   equal count(water)/3.0
variable nexchangeable_ions equal count(sodium)

compute zlow clay_lower reduce ave z
compute zup  clay_upper reduce ave z

variable zlow_now equal c_zlow
variable zup_now  equal c_zup

variable basal_proxy equal v_zup_now-v_zlow_now
variable zcenter equal 0.5*(v_zup_now+v_zlow_now)

# Dynamic water counting based on mineral mass centers.
variable is_bottom_ow atom (type==8)&&(z<v_zlow_now)
variable is_inter_ow  atom (type==8)&&(z>=v_zlow_now)&&(z<=v_zup_now)
variable is_top_ow    atom (type==8)&&(z>v_zup_now)

compute nw_bottom all reduce sum v_is_bottom_ow
compute nw_inter  all reduce sum v_is_inter_ow
compute nw_top    all reduce sum v_is_top_ow

variable nwat_bottom equal c_nw_bottom
variable nwat_inter  equal c_nw_inter
variable nwat_top    equal c_nw_top
variable nwat_ext    equal v_nwat_bottom+v_nwat_top

variable tacc equal f_mygcmc[2]/(f_mygcmc[1]+0.1)
variable iacc equal f_mygcmc[4]/(f_mygcmc[3]+0.1)
variable dacc equal f_mygcmc[6]/(f_mygcmc[5]+0.1)
variable racc equal f_mygcmc[8]/(f_mygcmc[7]+0.1)

variable temp_inst equal temp
variable pe_inst equal pe

thermo 5000
thermo_style custom step temp pe ke etotal press atoms &
  v_nwater_mol v_nwat_inter v_nwat_bottom v_nwat_top v_nwat_ext v_nexchangeable_ions &
  v_iacc v_dacc v_tacc v_racc &
  v_zlow_now v_zup_now v_basal_proxy v_zcenter v_p_h2o cpu

fix mon all ave/time 1000 1 1000 &
  v_nwater_mol v_nwat_inter v_nwat_bottom v_nwat_top v_nwat_ext &
  v_basal_proxy v_zcenter v_iacc v_dacc v_tacc v_racc v_temp_inst v_pe_inst &
  append monitor_gcmc_rh0p90.dat

dump d1 all custom 50000 dump.gcmc_rh0p90.lammpstrj id mol type q x y z vx vy vz
dump_modify d1 sort id

restart 100000 restart.gcmc_rh0p90.*

run 100000

write_restart restart.gcmc_rh0p90.final
write_data after_gcmc_rh0p90_initial.data
